Pb V0001 = AANZ;
K = Pb.K;
M = Pb.M;
CL_TOT = Pb.CL_TOT;
CHA_TOT = Pb.CHA_TOT;
U0 = Pb.U0;
V0 = Pb.V0;
P_intere = Pb.P_intere;
dt = V0001.dt;
Ttot = V0001.Ttot;
En_Nb_Re = AAGZ dt Ttot;
Vec_T = PROG 0. PAS dt Ttot ;
C = ((1e-4*K) ET (1e4*M)) *0.1;
CL_A = CL_TOT;
schema = 3 ;
alpha = 0.0;
beta = 0.25;
gamma = 0.5;
TEMPS ZERO;
Solu1 = AAAZ M C K CL_A CHA_TOT
alpha beta gamma dt Ttot U0 V0;
* CALCULER AMPLITUDE ICI
TEMPS;
*Solu2 = AAAZ M C K CL_A FOR2 alpha beta gamma dt Ttot U0 V0;
*list Solu1;
TEMPS ZERO;
FamiF = TABLE;
FamiG = TABLE;
*Creation des modes dep imposes non nuls et dep initiaux
FamiF.Cal = TABLE;
FamiG.Cal = TABLE;
FamiF.Imp = TABLE;
FamiG.Imp = TABLE;
FamiF.Ini = TABLE;
FamiG.Ini = TABLE;
NbModCal = 5;
OPT0 = TABLE;
OPT0.Orth = VRAI;
AARZ NbModCal;
Mess 'SORTIE' ;
TEMPS;
AffMods = LECT 1 2 3;
AffSolu = LECT 1 2 3;
DirPriv = 'UX';
*OPTI TRAC PSC;
AAKZ AffMods AffSolu P_intere DirPriv;
* Attention multiplier par 2 ampli pour corespondance avec matlab.
*opti donn 5 ;
*Pas_inte = 250;
*trac Solu1.u.Pas_inte Pb.geo;
*rec_sol = AALZ 3;
*trac rec_sol.u.Pas_inte Pb.geo;
*BLA = EXCO DirPriv rec_sol.u.Pas_inte;
*Def1 = DEFO Pb.geo rec_sol.u.Pas_inte;
*Ampli = (MAXI BLA) - (MINI BLA);
*    list Ampli;
*trac (ABS BLA) Def1;
ErrDepMo ErrParMo = AAPZ DirPriv VRAI;
*AffMods = LECT 1 ;
*AAOZ AffMods;
Cha_p PremIni PremTot P_1 New_G= AAVZ;
opti donn 5;
*
opti sort bla;
sort EXCE Sol_dir SEPA ESPA;
